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/batch
! ANSYS input file written by Workbench version 2026 R1
! File used for geometry attach: C:\Users\User\OneDrive\Documents\ANSYS Files\2D Conductio n_files\dp0\SYS\DM\SYS.scdocx
/title,2D Conductio n--Steady-State Thermal (A5)
/com,--- Data in consistent MKS units. See Solving Units in the help system for more information.
/units,MKS
/prep7
! Turn off shape checking because checks already performed inside WB mesher.
! See help system for more information.
SHPP,OFF,,NOWARN
etcon,set             ! allow ANSYS to choose best KEYOP's for 180x elements, resets any applicable keyopt to MAPDL defaults
/com,*********** Send User Defined Coordinate System(s) ***********
csys,0
/com,*********** Nodes for the whole assembly ***********
nblock,3,,133
(1i9,3e20.9e3)
        1     1.000000000E+00     2.000000000E+00     0.000000000E+00
        2     0.000000000E+00     2.000000000E+00     0.000000000E+00
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-1
/com,*********** Elements for Body 1 'SYS\Surface' ***********
et,1,293
keyo,1,3,3
MAT,1 $ TYPE,1 $ REAL,1 $ SECNUM,1 $ ESYS,0    ! ELEMNODES = 8
eblock,21,COMPACT,,32
(21i9)
        1       33        5       42        3       56       57       51       50
        2       34       12        5       33       78       55       56      112
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-1
secnum,1    ! reset the section ID to default
toffst,273.15,      ! Temperature offset from absolute zero
/com,*********** Send Materials ***********
MP,KXX,1,1,	! W m^-1 C^-1

/com,*********** Send Sheet Properties ***********
r,1,1.

!************************* Model Summary ********************
! SYS\Surface,	big red,	matid,	1
!************************* End Model Summary ********************
/com,*********** Define Temperature Constraint ***********
CMBLOCK,_CM47   ,NODE,        8
(8i10)
         3         4        33       -35        50        53       112       113
fcum,add                   ! add nodal forces up (needed in case have loads on the same edge,vertex)
fcum                       ! reset default on fcum command since done sending WB F loads
/com,*********** Create "Convection" ***********
et,2,151
keyop,2,3,10        ! get plane option and thickness from underlying element
MAT,2 $ TYPE,2 $ REAL,2 $ SECNUM,2 $ ESYS,0    ! ELEMNODES = 3
eblock,21,COMPACT,,8
(21i9)
       33       26        4       52
       34       27       26      106
       35       28       27      107
       36       29       28      108
       37       30       29      109
       38       31       30      110
       39       32       31      111
       40        1       32       46
-1
secnum,1    ! reset the section ID to default
esel,s,type,,2
keyop,2,8,2
keyop,2,13,0
esel,all
/com,***************** Define Uniform Initial temperature ***************
tunif,22.
fini
/com,****************************************************************************
/com,*************************    SOLUTION       ********************************
/com,****************************************************************************
/solu
antype,0                   ! static analysis
!eqsl,sparse               ! using sparse solver which is default so no eqsl command needed
cntr,print,1               ! print out contact info and also make no initial contact an error
cncheck,dmp		!	Enable program controlled contact splitting for distributed memory parallel run
rescontrol,,none                 ! Do not keep any restart files
dmpoption,emat,no             ! Don't combine emat file for DANSYS
dmpoption,esav,no             ! Don't combine esav file for DANSYS
/com,****************************************************
/com,******************* SOLVE FOR LS 1 OF 1 ****************
d,_CM47,temp,1.
esel,s,type,,2
nsle
sf,all,conv,5.,0.
nsel,all
esel,all
autots,on
nsub,1,10,1
time,1.
outres,erase
outres,all,none
outres,nsol,all
outres,rsol,all
outres,eangl,all
outres,veng,all
outres,fflux,all,
outres,cont,all,
esel,s,type,,2
cm,_elmisc,elem
esel,all
outres,misc,all,_elmisc
cnvtol,heat,,1.e-003,,1.e-006 ! Program Controlled. Set MINREF equivalent of 1e-6 Watts
! *********** WB SOLVE COMMAND ***********
! check interactive state
*get,ANSINTER_,active,,int
*if,ANSINTER_,ne,0,then
/eof
*endif
solve
/com *************** Write FE CONNECTORS *********
CEWRITE,file,ce,,INTE
/com,****************************************************
/com,*************** FINISHED SOLVE FOR LS 1 *************
fini
/post1
fini
