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/batch
! ANSYS input file written by Workbench version 2026 R1
! File used for geometry attach: C:\Users\User\OneDrive\Documents\ANSYS Files\Bike Crank Homework\Bike Crank Homework_files\dp0\SYS\DM\SYS.agdb
/title,Bike Crank Homework--Static Structural (A5)
/com,--- Data in consistent BIN units. See Solving Units in the help system for more information.
/units,BIN
/prep7
! Turn off shape checking because checks already performed inside WB mesher.
! See help system for more information.
SHPP,OFF,,NOWARN
etcon,set             ! allow ANSYS to choose best KEYOP's for 180x elements, resets any applicable keyopt to MAPDL defaults
/com,*********** Send User Defined Coordinate System(s) ***********
csys,0
/com,*********** Nodes for the whole assembly ***********
nblock,3,,15780
(1i9,3e20.9e3)
        1     2.318804626E-01    -9.344222071E-02     9.375000000E-02
        2     2.318824949E-01    -9.343719044E-02     0.000000000E+00
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-1
/com,*********** Elements for Body 1 'Solid' ***********
et,1,187
MAT,1 $ TYPE,1 $ REAL,1 $ SECNUM,1 $ ESYS,0    ! ELEMNODES = 10
eblock,21,COMPACT,,7808
(21i9)
        1     1234     1225     1177     1228    10017    10014     2572    14344    13245    14343
        2     1234     1228     1177     1173    14344    14343     2572     2575    10025     2573
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-1
secnum,1    ! reset the section ID to default
et,2,186
keyo,2,2,1          ! set full integration on SOLID186
MAT,1 $ TYPE,2 $ REAL,1 $ SECNUM,1 $ ESYS,0    ! ELEMNODES = 20
eblock,21,COMPACT,,1031
(21i9)
     7809     1431     1428     1905     1892     1433     1433     1433     1433     2478    14149    12674    14101     1433     1433     1433     1433    13458    10822     2896    12692
     7810      759      756     1901     1890     1918     1918     1918     1918     2514    12679    12665    12683     1918     1918     1918     1918    12690     8287    12662    12666
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-1
secnum,1    ! reset the section ID to default
toffst,459.67,      ! Temperature offset from absolute zero
/com,*********** Set Reference Temperature ***********
tref,71.6
/com,*********** Send Materials ***********
MP,EX,1,9999999.99889292,	! slinch s^-2 in^-1
MP,NUXY,1,0.33,

!************************* Model Summary ********************
! Solid,	Al 6061 T6,	matid,	1
!************************* End Model Summary ********************
/com,*********** Fixed Supports ***********
CMBLOCK,_FIXEDSU,NODE,      376
(8i10)
         1        -4         6         7         9        10        12        13
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cmsel,s,_FIXEDSU
d,all,all
nsel,all
/com,*********** Define Force Using Surface Effect Elements ***********
local,12,0,0.,0.,0.,0.,0.,0.
csys,0
et,3,154
MAT,3 $ TYPE,3 $ REAL,3 $ SECNUM,3 $ ESYS,12    ! ELEMNODES = 8
eblock,21,COMPACT,,8
(21i9)
     9871      562     1160     1152     1200     5181     2559    13724     2563
     9872      561     1179     1160      562    12324     2558     5181     2562
     9873     1214     1184     1179      561    10046     2557    12324     2569
     9874     1197     1167     1184     1214    12325     2556    10046     2568
     9875     1232     1165     1167     1197    10118     2555    12325     2565
     9876     1233     1172     1165     1232    10233     2554    10118     2564
     9877     1206     1154     1172     1233    12348     2561    10233     2567
     9878     1200     1152     1154     1206    13724     2560    12348     2566
-1
secnum,1    ! reset the section ID to default
esel,s,type,,3
keyop,3,2,1         ! Apply load in local coordinate system
keyop,3,7,1         ! Use original area so load is constant in large deformation
esel,all
fini
/com,****************************************************************************
/com,*************************    SOLUTION       ********************************
/com,****************************************************************************
/solu
antype,0                   ! static analysis
_thickRatio=  1     ! Ratio of thick parts in the model
eqsl,pcg,1e-8,,,,,,1
cntr,print,1               ! print out contact info and also make no initial contact an error
cncheck,dmp		!	Enable program controlled contact splitting for distributed memory parallel run
dmpoption,emat,no             ! Don't combine emat file for DANSYS
dmpoption,esav,no             ! Don't combine esav file for DANSYS
nldiag,cont,iter           ! print out contact info each equilibrium iteration
rescontrol,,none                 ! Do not keep any restart files
/com,****************************************************
/com,******************* SOLVE FOR LS 1 OF 1 ****************
esel,s,type,,3
nsle
sfe,all,1,pres,1,0.
sfe,all,2,pres,1,509.490909691141
sfe,all,3,pres,1,0.
nsel,all
esel,all
nsub,1,1,1
time,1.
outres,erase
outres,all,none
outres,nsol,all,
outres,rsol,all
outres,eangl,all
outres,etmp,all
outres,veng,all
outres,strs,all,
outres,bkstr,all,
outres,epel,all,
outres,eppl,all,
outres,cont,all,
outres,nldat,all,
stabilize,off                   ! Stabilization turned OFF by user
! *********** WB SOLVE COMMAND ***********
! check interactive state
*get,ANSINTER_,active,,int
*if,ANSINTER_,ne,0,then
/eof
*endif
solve
/com *************** Write FE CONNECTORS *********
CEWRITE,file,ce,,INTE
/com,****************************************************
/com,*************** FINISHED SOLVE FOR LS 1 *************
fini
*get,_NSOLTHREADS,active,0,ntfs
*get,_NSOLPROCESSES,active,0,npfs
*get,_PCGITER,active,,solu,cgiter
/post1
fini
